# OpenSim document version 40500
ScaleTool Rajagopal2016-scaled:
  mass: 75.337 [kg]
  height: -1
  age: -1
  ModelScaler:
    apply: true
    scaling_order: measurements
    marker_file: C:/Users/gehri/OneDrive - Liverpool John Moores University/Sports biomech/Assignment 2/opensim-paf/7115-paf-opensim/assets/../outputs/static_markers.trc
    time_range: 0 0.02777778
    preserve_mass_distribution: false
    MeasurementSet:
      Measurement pelvis_x: apply=true
        MarkerPair: markers=(RASI RPSI)
        MarkerPair: markers=(LASI LPSI)
        BodyScale pelvis: axes=X
      Measurement torso: apply=true
        MarkerPair: markers=(RASI STRN)
        MarkerPair: markers=(LASI STRN)
        MarkerPair: markers=(STRN CLAV)
        MarkerPair: markers=(CLAV RSHO)
        MarkerPair: markers=(CLAV LSHO)
        MarkerPair: markers=(CLAV C7)
        MarkerPair: markers=(C7 T10)
        MarkerPair: markers=(C7 RBAK)
        MarkerPair: markers=(C7 RFHD)
        MarkerPair: markers=(C7 RBHD)
        MarkerPair: markers=(C7 LFHD)
        MarkerPair: markers=(C7 LBHD)
        MarkerPair: markers=(LPSI T10)
        MarkerPair: markers=(RPSI T10)
        MarkerPair: markers=(T10 C7)
        BodyScale torso: axes=(X Y Z)
      Measurement thigh: apply=true
        MarkerPair: markers=(LASI LMKNE)
        MarkerPair: markers=(LASI LKNE)
        MarkerPair: markers=(RASI RKNE)
        MarkerPair: markers=(RASI RMKNE)
        MarkerPair: markers=(RASI RTHI)
        MarkerPair: markers=(RTHI RKNE)
        MarkerPair: markers=(LASI LTHI)
        MarkerPair: markers=(LTHI LKNE)
        BodyScale femur_r: axes=(X Y Z)
        BodyScale femur_l: axes=(X Y Z)
      Measurement pelvis_z: apply=true
        MarkerPair: markers=(RPSI LPSI)
        MarkerPair: markers=(RASI LASI)
        BodyScale pelvis: axes=Z
      Measurement shank: apply=true
        MarkerPair: markers=(RMKNE RMANK)
        MarkerPair: markers=(RKNE RANK)
        MarkerPair: markers=(LMKNE LMANK)
        MarkerPair: markers=(LKNE LANK)
        MarkerPair: markers=(RKNE RTIB)
        MarkerPair: markers=(RANK RTIB)
        MarkerPair: markers=(LANK LTIB)
        MarkerPair: markers=(LKNE LTIB)
        BodyScale tibia_r: axes=(X Y Z)
        BodyScale tibia_l: axes=(X Y Z)
      Measurement foot: apply=true
        MarkerPair: markers=(LHEE LTOE)
        MarkerPair: markers=(RHEE RTOE)
        BodyScale calcn_r: axes=(X Y Z)
        BodyScale toes_r: axes=(X Y Z)
        BodyScale calcn_l: axes=(X Y Z)
        BodyScale toes_l: axes=(X Y Z)
      Measurement humerus: apply=true
        MarkerPair: markers=(RSHO RMELB)
        MarkerPair: markers=(RSHO RELB)
        MarkerPair: markers=(LSHO LMELB)
        MarkerPair: markers=(LSHO LELB)
        BodyScale humerus_r: axes=(X Y Z)
        BodyScale humerus_l: axes=(X Y Z)
      Measurement radius/ulna: apply=true
        MarkerPair: markers=(RMELB RWRB)
        MarkerPair: markers=(RELB RWRA)
        MarkerPair: markers=(LMELB LWRB)
        MarkerPair: markers=(LELB LWRA)
        BodyScale ulna_r: axes=(X Y Z)
        BodyScale radius_r: axes=(X Y Z)
        BodyScale ulna_l: axes=(X Y Z)
        BodyScale radius_l: axes=(X Y Z)
      Measurement hand: apply=true
        MarkerPair: markers=(RWRA RFIN)
        MarkerPair: markers=(RWRB RFIN)
        MarkerPair: markers=(LWRA LFIN)
        MarkerPair: markers=(LWRB LFIN)
        BodyScale hand_r: axes=(X Y Z)
        BodyScale hand_l: axes=(X Y Z)
  MarkerPlacer:
    apply: true
    marker_file: C:/Users/gehri/OneDrive - Liverpool John Moores University/Sports biomech/Assignment 2/opensim-paf/7115-paf-opensim/assets/../outputs/static_markers.trc
    time_range: 0 0.02777778
    max_marker_movement: -1
    IKTaskSet:
      IKMarkerTask RSHO: apply=true weight=1
      IKMarkerTask LSHO: apply=true weight=1
      IKMarkerTask C7: apply=true weight=1
      IKMarkerTask CLAV: apply=true weight=1
      IKMarkerTask RUPA: apply=true weight=1
      IKMarkerTask RELB: apply=true weight=1
      IKMarkerTask RMELB: apply=true weight=1
      IKMarkerTask RFRM: apply=false weight=1
      IKMarkerTask RWRA: apply=true weight=1
      IKMarkerTask RWRB: apply=true weight=1
      IKMarkerTask LUPA: apply=true weight=1
      IKMarkerTask LELB: apply=true weight=1
      IKMarkerTask LMELB: apply=true weight=1
      IKMarkerTask LFRM: apply=false weight=1
      IKMarkerTask LWRA: apply=true weight=1
      IKMarkerTask LWRB: apply=true weight=1
      IKMarkerTask RASI: apply=true weight=100
      IKMarkerTask LASI: apply=true weight=100
      IKMarkerTask RPSI: apply=true weight=50
      IKMarkerTask LPSI: apply=true weight=50
      IKMarkerTask RTHI: apply=false weight=1
      IKMarkerTask RKNE: apply=true weight=50
      IKMarkerTask RMKNE: apply=true weight=50
      IKMarkerTask RTIB: apply=true weight=1
      IKMarkerTask RANK: apply=true weight=1
      IKMarkerTask RMANK: apply=true weight=1
      IKMarkerTask RHEE: apply=true weight=1
      IKMarkerTask RTOE: apply=true weight=1
      IKMarkerTask LTHI: apply=false weight=1
      IKMarkerTask LKNE: apply=true weight=50
      IKMarkerTask LMKNE: apply=true weight=50
      IKMarkerTask LTIB: apply=true weight=1
      IKMarkerTask LANK: apply=true weight=1
      IKMarkerTask LMANK: apply=true weight=1
      IKMarkerTask LHEE: apply=true weight=1
      IKMarkerTask LTOE: apply=true weight=1
      IKMarkerTask STRN: apply=true weight=1
      IKMarkerTask T10: apply=true weight=1
      IKMarkerTask RFHD: apply=true weight=1
      IKMarkerTask LFHD: apply=true weight=1
      IKMarkerTask RBHD: apply=true weight=1
      IKMarkerTask LBHD: apply=true weight=1
      IKMarkerTask RBAK: apply=true weight=1
      IKMarkerTask RFIN: apply=false weight=1
      IKMarkerTask LFIN: apply=false weight=1
